*Heading
** Job name: Job-2Model-2V1 Model name: Model-2V1
** Generated by: Abaqus/CAE 2022
*Preprint, echo=NO, model=NO, history=NO, contact=NO
**
** PARTS
**
*Part, name=Plate
*Node
      1,     0.035379, 0.0130000003
      2,  0.033926785, 0.0148755973
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*Element, type=CPE3
 1, 1170,    1,  115
 2, 1174,  122, 1170
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*Element, type=COH2D4
4927, 2613,   27,   27,  196
4928, 2614, 2613,  196,  197
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*Nset, nset=Uel_Set-MatrixCenter
   27,   28,   29,   30,   37,   38
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*Elset, elset=Uel_Set-MatrixCenter, generate
 3556,  3760,     1
*Nset, nset=Uel_Set-MatrixOut
    1,    2,    3,    4,    5,    6
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*Elset, elset=Uel_Set-MatrixOut
   30,   31,   32,   33,   34,   35
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*Nset, nset=Uel_Set-Particle
    1,    2,    3,    4,    5,    6
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*Elset, elset=Uel_Set-Particle
    1,    2,    3,    4,    5,    6
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*Elset, elset=CohesiveSeam-1-Elements, generate
 4927,  5094,     1
*Nset, nset=CohesiveSeam-1-TopNodes
   27,   28,   31,   32,   33,   34
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*Nset, nset=CohesiveSeam-1-BottomNodes
   27,   28,   31,   32,   33,   34
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*Nset, nset=CohesiveSeam-1-MidNodes
 27, 28, 31, 32, 33, 34, 35, 39, 40, 41, 42, 43, 44, 45, 48
*Elset, elset=__PickedSurf63_S3, internal, generate
 4927,  5094,     1
*Surface, type=ELEMENT, name=_PickedSurf63, internal
__PickedSurf63_S3, S3
*Elset, elset=_CohesiveSeam-1-TopSurf_S3, internal, generate
 4927,  5094,     1
*Surface, type=ELEMENT, name=CohesiveSeam-1-TopSurf
_CohesiveSeam-1-TopSurf_S3, S3
*Elset, elset=_CohesiveSeam-1-BottomSurf_S1, internal, generate
 4927,  5094,     1
*Surface, type=ELEMENT, name=CohesiveSeam-1-BottomSurf
_CohesiveSeam-1-BottomSurf_S1, S1
** Section: Section-UelParticle
*Solid Section, elset=Uel_Set-Particle, material=Material-Uel
,
** Section: Section-UelMatrixOut
*Solid Section, elset=Uel_Set-MatrixOut, material=Material-Uel
,
** Section: Section-UelMatrixCenter
*Solid Section, elset=Uel_Set-MatrixCenter, material=Material-Uel
,
** Section: Section-Coh
*Cohesive Section, elset=CohesiveSeam-1-Elements, controls=EC-1, material=Material-Coh, response=TRACTION SEPARATION
,
*End Part
**
**
** ASSEMBLY
**
*Assembly, name=Assembly
**
*Instance, name=Plate-1, part=Plate
*End Instance
**
*Nset, nset=Set-BTM, instance=Plate-1
  112,  113, 1117, 1118, 1119, 1120
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*Elset, elset=Set-BTM, instance=Plate-1
 4067, 4068, 4069, 4070, 4076, 4157
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*Nset, nset=Set-LEFT, instance=Plate-1
  11,  12, 139, 140, 141, 142, 143, 144, 145, 146, 147, 148, 149
*Elset, elset=Set-LEFT, instance=Plate-1
   37,   38,   48,   57,   58,   63
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*Nset, nset=Set-LOW, instance=Plate-1
 108, 113
*Nset, nset=Set-RIGHT, instance=Plate-1
  24,  25, 182, 183, 184, 185, 186, 187, 188, 189, 190, 191, 192
*Elset, elset=Set-RIGHT, instance=Plate-1
 149, 150, 152, 159, 161, 166
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*Nset, nset=Set-TOP, instance=Plate-1
  108,  109, 1014, 1015, 1016, 1017
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*Elset, elset=Set-TOP, instance=Plate-1
 2462, 2465, 2476, 2477, 2480, 2772
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*End Assembly
**
** ELEMENT CONTROLS
**
*Section Controls, name=EC-1, ELEMENT DELETION=NO, VISCOSITY=0.0001
1., 1., 1.
**
** MATERIALS
**
*Material, name=Material-Coh
*Damage Initiation, criterion=MAXS
100.,100.,100.
*Damage Evolution, type=ENERGY, mixed mode behavior=BK, power=2.5
 0.0091, 0.0091, 0.0091
*Damage Stabilization
0.0001
*Elastic, type=TRACTION
87000.,87000.,87000.
*Material, name=Material-Uel
*Density
 0.00785,
*Depvar
     24,
*User Material, constants=2
 1e-11, 0.3
** ----------------------------------------------------------------
**
** STEP: Step-1
**
*Step, name=Step-1, nlgeom=NO, extrapolation=NO, inc=20000, convert sdi=YES
*Static, direct=NO STOP
5e-05, 1.,
**
** BOUNDARY CONDITIONS
**
** Name: BC-BTM Type: Displacement/Rotation
*Boundary
Set-BTM, 1, 1, -0.0002
** Name: BC-LOW Type: Displacement/Rotation
*Boundary
Set-LOW, 2, 2
** Name: BC-TOP Type: Displacement/Rotation
*Boundary
Set-TOP, 1, 1, 0.0002
**
** OUTPUT REQUESTS
**
*Restart, write, frequency=0
**
** FIELD OUTPUT: F-Output-1
**
*Output, field, frequency=20
*Node Output
CF, RF, U
*Element Output, directions=YES
LE, PE, PEEQ, PEMAG, S, SDV
*Contact Output
CDISP, CSTRESS
**
** HISTORY OUTPUT: H-Output-1
**
*Output, history, variable=PRESELECT, frequency=20
*End Step
