*Heading
** Job name: Job-2Model-2V1 Model name: Model-2V1
** Generated by: Abaqus/CAE 2022
*Preprint, echo=NO, model=NO, history=NO, contact=NO
**
** PARTS
**
*Part, name=Plate
*Node
      1,     0.035379, 0.0130000003
      2,  0.033926785, 0.0148755973
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*********************** TRIANGULAR ****************************
** ------------------- Displacement ---------------------------
*User element, nodes=3, type=U1, properties=12, coordinates=2, VARIABLES=34
1,2
** -------------------- Phase  field --------------------------
*User element, nodes=3, type=U3, properties=5, coordinates=2, VARIABLES=5
3
***************************************************************
***************************************************************
*Element, type=U1
1, 1170,    1, 115
2, 1174,  122, 1170
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***************************************************************
*Element, type=U3
4927, 1170,    1, 115
4928, 1174,  122, 1170
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***************************************************************
*Element, type=CPE3
9853, 1170,    1, 115
9854, 1174,  122, 1170
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***************************************************************
*Element, type=COH2D4
14779, 2613,   27,   27, 196
14780, 2614, 2613,  196, 197
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***************************************************************
********************** ASSIGNING MATERIAL PROP ****************
*Nset, nset=Uel_Set-MatrixCenter
   27,   28,   29,   30,   37,   38
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*Elset, elset=Uel_Set-MatrixCenter, generate
 3556,  3760,     1
*Nset, nset=Uel_Set-MatrixOut
    1,    2,    3,    4,    5,    6
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*Elset, elset=Uel_Set-MatrixOut
   30,   31,   32,   33,   34,   35
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*Nset, nset=Uel_Set-Particle
    1,    2,    3,    4,    5,    6
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*Elset, elset=Uel_Set-Particle
    1,    2,    3,    4,    5,    6
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*Elset, elset=CohesiveSeam-1-Elements, generate
14779, 14946, 1,
*Nset, nset=CohesiveSeam-1-TopNodes
   27,   28,   31,   32,   33,   34
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*Nset, nset=CohesiveSeam-1-BottomNodes
   27,   28,   31,   32,   33,   34
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*Nset, nset=CohesiveSeam-1-MidNodes
 27, 28, 31, 32, 33, 34, 35, 39, 40, 41, 42, 43, 44, 45, 48
*Elset, elset=__PickedSurf63_S3, internal, generate
14779, 14946, 1,
*Surface, type=ELEMENT, name=_PickedSurf63, internal
__PickedSurf63_S3, S3
*Elset, elset=_CohesiveSeam-1-TopSurf_S3, internal, generate
14779, 14946, 1,
*Surface, type=ELEMENT, name=CohesiveSeam-1-TopSurf
_CohesiveSeam-1-TopSurf_S3, S3
*Elset, elset=_CohesiveSeam-1-BottomSurf_S1, internal, generate
14779, 14946, 1,
*Surface, type=ELEMENT, name=CohesiveSeam-1-BottomSurf
_CohesiveSeam-1-BottomSurf_S1, S1
***************************************************************
*Uel property, elset=Uel_Set-MatrixCenter
87000, 0.3, 87000, 87000, 0, 1, 0.00785, 1,
0, 0.012, 0.0091, 0
*Uel property, elset=Uel_Set-MatrixOut
87000, 0.3, 87000, 87000, 0, 1, 0.00785, 1,
0, 0.012, 0.0091, 0
*Uel property, elset=Uel_Set-Particle
489000, 0.3, 489000, 489000, 0, 1, 0.00785, 1,
0, 0.0042, 0.0265, 0
**E, nu, Y, H, eps_cr, thick, rho, anisoswt
**plswt, lc, gc, drswt
***************************************************************
*Elset, elset=Uel_Set-MatrixCenter_PH, generate
8482, 8686, 1
*Elset, elset=Uel_Set-MatrixOut_PH
4956, 4957, 4958, 4959, 4960, 4961
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*Elset, elset=Uel_Set-Particle_PH
4927, 4928, 4929, 4930, 4931, 4932
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***************************************************************
*Uel property, elset=Uel_Set-MatrixCenter_PH
0.012, 0.0091, 1, 1, 0
*Uel property, elset=Uel_Set-MatrixOut_PH
0.012, 0.0091, 1, 1, 0
*Uel property, elset=Uel_Set-Particle_PH
0.0042, 0.0265, 1, 1, 0
**lc, gc, thick, elswt, drswt
***************************************************************
*Elset, elset=umatelem, generate
9853, 14778, 1
***************************************************************
** Section: Section-UelParticle
*Solid Section, elset=umatelem, material=Material-Uel
,
** Section: Section-Coh
*Cohesive Section, elset=CohesiveSeam-1-Elements, controls=EC-1, material=Material-Coh, response=TRACTION SEPARATION
,
*End Part
**
**
** ASSEMBLY
**
*Assembly, name=Assembly
**
*Instance, name=Plate-1, part=Plate
*End Instance
**
*Nset, nset=Set-BTM, instance=Plate-1
  112,  113, 1117, 1118, 1119, 1120
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*Elset, elset=Set-BTM, instance=Plate-1
13919, 13920, 13921, 13922, 13928, 14009
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*Nset, nset=Set-LEFT, instance=Plate-1
  11,  12, 139, 140, 141, 142, 143, 144, 145, 146, 147, 148, 149
*Elset, elset=Set-LEFT, instance=Plate-1
9889, 9890, 9900, 9909, 9910, 9915
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*Nset, nset=Set-LOW, instance=Plate-1
 108, 113
*Nset, nset=Set-RIGHT, instance=Plate-1
  24,  25, 182, 183, 184, 185, 186, 187, 188, 189, 190, 191, 192
*Elset, elset=Set-RIGHT, instance=Plate-1
10001, 10002, 10004, 10011, 10013, 10018
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*Nset, nset=Set-TOP, instance=Plate-1
  108,  109, 1014, 1015, 1016, 1017
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*Elset, elset=Set-TOP, instance=Plate-1
12314, 12317, 12328, 12329, 12332, 12624
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**
*Elset, elset=umatelem, instance=Plate-1, generate
9853, 14778, 1
**
*End Assembly
***************************************************************
**
** ELEMENT CONTROLS
**
*Section Controls, name=EC-1, ELEMENT DELETION=NO, VISCOSITY=0.0001
1., 1., 1.
**
** MATERIALS
**
*Material, name=Material-Coh
*Damage Initiation, criterion=MAXS
100.,100.,100.
*Damage Evolution, type=ENERGY, mixed mode behavior=BK, power=2.5
 0.0091, 0.0091, 0.0091
*Damage Stabilization
0.0001
*Elastic, type=TRACTION
87000.,87000.,87000.
*Material, name=Material-Uel
*Density
 0.00785,
*Depvar
     24,
*User Material, constants=2
 1e-11, 0.3
** ----------------------------------------------------------------
**
** STEP: Step-1
**
*Step, name=Step-1, nlgeom=NO, extrapolation=NO, inc=20000, convert sdi=YES
*Static, direct=NO STOP
5e-05, 1.,
**
** BOUNDARY CONDITIONS
**
** Name: BC-BTM Type: Displacement/Rotation
*Boundary
Set-BTM, 1, 1, -0.0002
** Name: BC-LOW Type: Displacement/Rotation
*Boundary
Set-LOW, 2, 2
** Name: BC-TOP Type: Displacement/Rotation
*Boundary
Set-TOP, 1, 1, 0.0002
**
** OUTPUT REQUESTS
**
*Restart, write, frequency=0
**
** FIELD OUTPUT: F-Output-1
**
*Output, field, frequency=20
*Node Output
CF, RF, U
*Element Output, directions=YES
LE, PE, PEEQ, PEMAG, S, SDV
*Contact Output
CDISP, CSTRESS
**
** HISTORY OUTPUT: H-Output-1
**
*element output, elset=umatelem
SDV
**
*End Step
