*Heading
** Job name: Job-1 Model name: Model-1
** Generated by: Abaqus/CAE 2022
*Preprint, echo=NO, model=NO, history=NO, contact=NO
**
** PARTS
**
*Part, name=Part-1
*Node
      3,          0.5,          0.5
      4,          0.5,           1.
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**********************  RECTENGULAR  **************************
** -------------------- Displacement --------------------------
*User element, nodes=4, type=U2, properties=12, coordinates=2, VARIABLES=120
1,2
** -------------------- Phase  field --------------------------
*User element, nodes=4, type=U4, properties=5, coordinates=2, VARIABLES=12
3
***************************************************************
***************************************************************
*Element, type=U2
1, 109497, 110247, 110427, 109496
2, 109500, 112921, 110246, 109499
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***************************************************************
*Element, type=U4
13804, 109497, 110247, 110427, 109496
13805, 109500, 112921, 110246, 109499
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***************************************************************
*Element, type=CPE4
27607, 109497, 110247, 110427, 109496
27608, 109500, 112921, 110246, 109499
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***************************************************************
*Element, type=COH2D4
41410, 123387, 123586,      8, 109934
41411, 123388, 123387, 109934, 109933
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***************************************************************
********************** ASSIGNING MATERIAL PROP ****************
*Nset, nset=Uel-Set-Plate1
 109439, 109490, 109491, 109492, 109495, 109496
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*Elset, elset=Uel-Set-Plate1
     1,     2,     3,     4,     5,     6
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*Nset, nset=Uel-Set-Plate2
      3,      4,      8, 109389, 109493, 109494
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*Elset, elset=Uel-Set-Plate2, generate
  3226,  10152,      1
*Elset, elset=CohesiveSeam-1-Elements, generate
41410, 41609, 1,
*Nset, nset=CohesiveSeam-1-TopNodes
      3,      4,      8, 109594, 109595, 109596
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*Nset, nset=CohesiveSeam-1-BottomNodes, generate
 123387,  123587,       1
*Elset, elset=__PickedSurf15_S4, internal
30833, 31011, 31019, 31020, 31022, 31024
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*Elset, elset=__PickedSurf15_S2, internal
30834, 30835, 30894, 30895, 30896, 30897
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*Elset, elset=__PickedSurf15_S3, internal
31095, 34680, 34683, 34684, 34686, 34687
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*Elset, elset=__PickedSurf15_S1, internal
31271, 34566, 34568, 34575, 34602, 34603
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*Surface, type=ELEMENT, name=_PickedSurf15, internal
__PickedSurf15_S4, S4
__PickedSurf15_S2, S2
__PickedSurf15_S3, S3
__PickedSurf15_S1, S1
*Elset, elset=__PickedSurf36_S4, internal
27607, 27608, 27697, 27698, 30833, 31011
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*Elset, elset=__PickedSurf36_S1, internal
27616, 27617, 27632, 27699, 27701, 27702
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*Elset, elset=__PickedSurf36_S3, internal
27625, 27626, 27700, 27710, 27711, 27713
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*Elset, elset=__PickedSurf36_S2, internal
27840, 30834, 30835, 30894, 30895, 30896
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*Surface, type=ELEMENT, name=_PickedSurf36, internal
__PickedSurf36_S4, S4
__PickedSurf36_S1, S1
__PickedSurf36_S2, S2
__PickedSurf36_S3, S3
*Elset, elset=__PickedSurf45_S4, internal
30833, 31011, 31019, 31020, 31022, 31024
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*Elset, elset=__PickedSurf45_S2, internal
30834, 30835, 30894, 30895, 30896, 30897
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*Elset, elset=__PickedSurf45_S3, internal
31095, 34680, 34683, 34684, 34686, 34687
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*Elset, elset=__PickedSurf45_S1, internal
31271, 34566, 34568, 34575, 34602, 34603
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*Surface, type=ELEMENT, name=_PickedSurf45, internal
__PickedSurf45_S4, S4
__PickedSurf45_S2, S2
__PickedSurf45_S3, S3
__PickedSurf45_S1, S1
*Elset, elset=_CohesiveSeam-1-TopSurf_S3, internal, generate
41410, 41609, 1,
*Surface, type=ELEMENT, name=CohesiveSeam-1-TopSurf
_CohesiveSeam-1-TopSurf_S3, S3
*Elset, elset=_CohesiveSeam-1-BottomSurf_S1, internal, generate
41410, 41609, 1,
*Surface, type=ELEMENT, name=CohesiveSeam-1-BottomSurf
_CohesiveSeam-1-BottomSurf_S1, S1
***************************************************************
*Uel property, elset=Uel-Set-Plate1
210000, 0.3, 210000, 210000, 0, 1, 0.00785, 1,
0, 0.01, 2.7, 0
*Uel property, elset=Uel-Set-Plate2
168000, 0.3, 168000, 168000, 0, 1, 0.00785, 1,
0, 0.01, 3.375, 0
**E, nu, Y, H, eps_cr, thick, rho, anisoswt
**plswt, lc, gc, drswt
***************************************************************
*Elset, elset=Uel-Set-Plate1_PH
13804, 13805, 13806, 13807, 13808, 13809
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*Elset, elset=Uel-Set-Plate2_PH, generate
17029, 23955, 1
***************************************************************
*Uel property, elset=Uel-Set-Plate1_PH
0.01, 2.7, 1, 0, 0
*Uel property, elset=Uel-Set-Plate2_PH
0.01, 3.375, 1, 0, 0
**lc, gc, thick, elswt, drswt
***************************************************************
*Elset, elset=umatelem, generate
27607, 41409, 1
***************************************************************
** Section: Uel-Section-Plate
*Solid Section, elset=umatelem, material=Material-Plate
,
** Section: Coh-Section-Center
*Cohesive Section, elset=CohesiveSeam-1-Elements, controls=EC-1, material=Material-Coh, response=TRACTION SEPARATION
,
*End Part
**
**
** ASSEMBLY
**
*Assembly, name=Assembly
**
*Instance, name=Part-1-1, part=Part-1
*End Instance
**
*Node
      1,          0.5, -0.100000001,           0.
*Node
      2,          0.5,   1.10000002,           0.
*Nset, nset=Set-BTM, instance=Part-1-1
      8, 109494, 109495, 109935, 109936, 109937
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*Elset, elset=Set-BTM, instance=Part-1-1
34523, 34524, 34532, 34533, 34540, 34549
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*Nset, nset=Set-RP1
 1,
*Nset, nset=Set-RP2
 2,
*Nset, nset=Set-TOP, instance=Part-1-1
      4, 109492, 109493, 109693, 109694, 109695
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*Elset, elset=Set-TOP, instance=Part-1-1
27615, 27622, 27623, 27624, 27631, 27638
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** Constraint: Constraint-1
*Equation
2
Set-BTM, 2, 1.
Set-RP1, 2, -1.
** Constraint: Constraint-2
*Equation
2
Set-TOP, 2, 1.
Set-RP2, 2, -1.
**
*Elset, elset=umatelem, instance=Part-1-1, generate
27607, 41409, 1
**
*End Assembly
***************************************************************
**
** ELEMENT CONTROLS
**
*Section Controls, name=EC-1, ELEMENT DELETION=YES, MAX DEGRADATION=0.99, VISCOSITY=0.0001
1., 1., 1.
**
** MATERIALS
**
*Material, name=Material-Coh
*Damage Initiation, criterion=MAXS
100.,100.,100.
*Damage Evolution, type=ENERGY, softening=EXPONENTIAL, mixed mode behavior=BK, power=2.5
1.,1.,1.
*Damage Stabilization
0.0001
*Elastic, type=TRACTION
 2.5e+06, 2.5e+06, 2.5e+06
*Material, name=Material-Plate
*Density
 1e-11,
*Depvar
     24,
*User Material, constants=2
 1e-11, 0.3
** ----------------------------------------------------------------
**
** STEP: Step-1
**
*Step, name=Step-1, nlgeom=YES, inc=10000
*Static
0.001, 1., 1e-15, 0.001
**
** BOUNDARY CONDITIONS
**
** Name: BC-BTM Type: Displacement/Rotation
*Boundary
Set-BTM, 1, 1
Set-BTM, 6, 6
** Name: BC-RP1 Type: Displacement/Rotation
*Boundary
Set-RP1, 2, 2, -0.02
** Name: BC-RP2 Type: Displacement/Rotation
*Boundary
Set-RP2, 2, 2, 0.02
** Name: BC-TOP Type: Displacement/Rotation
*Boundary
Set-TOP, 1, 1
Set-TOP, 6, 6
**
** OUTPUT REQUESTS
**
*Restart, write, frequency=0
**
** FIELD OUTPUT: F-Output-1
**
*Output, field, variable=PRESELECT, frequency=10
**
** HISTORY OUTPUT: H-Output-1
**
*element output, elset=umatelem
SDV
**
*End Step
